folder simulations: version=37; creator=Apsim 7.10-r4218
  simulation Namwon_2023
    metfile met
      filename=C:\Apsim_scenario_GUI\output\preprocess_weather\each\weather_met\Namwon_2023.met
    clock
      start_date = 19/10/2022  # Enter the start date of the simulation
      end_date = 20/06/2023  # Enter the end date of the simulation
    summaryfile
    area paddock
      Soil: Latitude=35.4023; Longitude=127.3351; YearOfSampling=0
        InitialWater Initial water: FractionFull=1; PercentMethod=FilledFromTop; RelativeTo=ll15
        Water
          Thickness  BD    AirDry  LL15  DUL   SAT   KS
          100        1.05  0.15    0.29  0.4   0.59  -
          100        1.05  0.26    0.29  0.4   0.59  0
          100        1.05  0.29    0.29  0.4   0.59  -
          100        1.05  0.29    0.29  0.4   0.59  -
          100        1.05  0.3     0.3   0.4   0.59  -
          100        1.05  0.31    0.31  0.4   0.59  -
          100        1.05  0.32    0.32  0.41  0.53  -
          100        1.05  0.33    0.33  0.48  0.53  -
          200        1.05  0.34    0.34  0.47  0.52  -
          500        1.05  0.35    0.35  0.46  0.51  -
          500        1.05  0.36    0.36  0.44  0.49  -
          SoilCrop Wheat
            LL=[0.29, 0.29, 0.32, 0.32, 0.35, 0.38, 0.41, 0.48, 0.47, 0.46, 0.44]
            KL=[0.1, 0.1, 0.08, 0.06, 0.04, 0.02, 0.01, 0, 0, 0, 0]
            XF=[1, 1, 1, 1, 1, 1, 1, 0, 0, 0, 0]
          SoilCrop Barley
            LL=[0.14, 0.147, 0.153, 0.158, 0.163, 0.169, 0.168, 0.172, 0.18, 0.201, 0.227]
            KL=[0.1, 0.1, 0.08, 0.06, 0.04, 0.02, 0.01, 0, 0, 0, 0]
            XF=[1, 1, 1, 1, 1, 1, 1, 0, 0, 0, 0]
          SoilCrop Chickpea
            LL=[0.29, 0.29, 0.36, 0.43, 0.51, 0.5, 0.5, 0.48, 0.47, 0.46, 0.44]
            KL=[0.1, 0.1, 0.08, 0.06, 0.04, 0.02, 0.01, 0, 0, 0, 0]
            XF=[1, 1, 1, 1, 1, 1, 1, 0, 0, 0, 0]
          SoilCrop Lucerne
            LL=[0.29, 0.29, 0.29, 0.29, 0.3, 0.31, 0.32, 0.33, 0.34, 0.35, 0.36]
            KL=[0.1, 0.1, 0.1, 0.1, 0.09, 0.09, 0.09, 0.09, 0.09, 0.09, 0.09]
            XF=[1, 1, 1, 1, 1, 1, 1, 1, 1, 1, 1]
          SoilCrop Maize
            LL=[0.29, 0.29, 0.34, 0.34, 0.37, 0.4, 0.42, 0.48, 0.47, 0.46, 0.44]
            KL=[0.1, 0.1, 0.1, 0.08, 0.06, 0.04, 0.02, 0, 0, 0, 0]
            XF=[1, 1, 1, 1, 1, 1, 1, 0, 0, 0, 0]
          SoilCrop Perennial Grass
            LL=[0.29, 0.29, 0.39, 0.41, 0.4, 0.4, 0.41, 0.41, 0.4, 0.4, 0.42]
            KL=[0.1, 0.1, 0.1, 0.1, 0.09, 0.07, 0.05, 0, 0, 0, 0]
            XF=[1, 1, 1, 1, 1, 1, 1, 0, 0, 0, 0]
          SoilCrop Sorghum
            LL=[0.29, 0.29, 0.35, 0.38, 0.4, 0.4, 0.4, 0.48, 0.47, 0.46, 0.44]
            KL=[0.1, 0.1, 0.1, 0.08, 0.06, 0.04, 0.02, 0, 0, 0, 0]
            XF=[1, 1, 1, 1, 1, 1, 1, 0, 0, 0, 0]
        SoilWater: SummerCona=6; SummerU=3.5; SummerDate=1-Jun; WinterCona=6; WinterU=3.5; WinterDate=1-Dec; DiffusConst=88; DiffusSlope=35; Salb=0.13; CN2Bare=73; CNRed=20; CNCov=0.8; Thickness=[100, 100, 100, 100, 100, 100, 100, 100, 200, 500, 500]; SWCON=[0.6, 0.6, 0.6, 0.6, 0.6, 0.6, 0.6, 0.3, 0.3, 0.3, 0.3]
        SoilOrganicMatter: RootCN=40; RootWt=200; SoilCN=12.5; EnrACoeff=7.4; EnrBCoeff=0.2; OCUnits=Total
          Thickness  OC    FBiom  FInert
          100        1.04  0.025  0.4
          100        0.89  0.02   0.6
          100        0.89  0.015  0.8
          100        0.89  0.01   0.9
          100        0.77  0.01   0.95
          100        0.45  0.01   0.95
          100        0.27  0.01   0.95
          100        0.22  0.01   0.95
          200        0.16  0.01   0.95
          500        0.13  0.01   0.95
          500        0.12  0.01   0.95
        Analysis: PHUnits=Water; BoronUnits=HotWater
          Thickness  Rocks  Texture  EC      PH    Ca    Mg    Na    K     ParticleSizeSand  ParticleSizeSilt  ParticleSizeClay
          100        20     loam     0.0453  6.48  7.24  1     0.21  0.67  25.5              48.4              26.2
          100        20     loam     0.0692  6.51  7.22  0.9   0.2   0.42  25.5              48.4              26.2
          100        20     loam     0.088   6.7   8.22  0.93  0.2   0.32  25.5              48.4              26.2
          100        20     loam     0.0794  6.86  7.47  0.93  0.18  0.31  25.5              48.4              26.2
        Sample Initial nitrogen: NO3Units=ppm; NH4Units=ppm; SWUnits=Volumetric; OCUnits=Total; PHUnits=Water
          Thickness  NO3    NH4
          150        6.503  0.599
          150        2.101  0.1
          300        2.101  0.1
          300        1.701  0.1
          300        1.701  0.1
          300        1.701  0.1
          300        1.701  0.1
          300        1.701  0.1
          300        1.701  0.1
          300        1.701  0.1
          300        1.701  0.1
      surfaceom SurfaceOrganicMatter
        PoolName = wheat  # Organic Matter pool name
        type = wheat  # Organic Matter type
        mass = 0  # Initial surface residue (kg/ha)
        cnr = 0  # C:N ratio of initial residue
        standing_fraction = 0  # Fraction of residue standing
      fertiliser
      wheat
        ini: filename=C:\APSIM_scenario_GUI\apsim_run\Saegeumgang.xml
      folder Manager folder
        manager2 Crop Management
          # Crop properties
          crop = wheat  # Name of this crop
          # Sowing criteria
          date1 = 10-oct  # Enter sowing window START date (dd-mmm)
          date3 = na  # Enter cultivar change date (na if not in use)
          date2 = 22-oct  # Enter sowing window END date (dd-mmm)
          must_sow = yes
          rain_amount = 0  # Enter amount of cumulative rainfall (mm)
          rain_days = 2  # Enter number of days to accumulate rainfall (days)
          esw_amount = 45  # Enter amount of soil water (mm)
          # Sowing Parameters
          cultivar1 = Saegeumgang  # Enter cultivar
          cultivar2 = na  # Enter 2nd Cultivar (na if not using a second cultivar)
          density1 = 400  # Enter sowing density (plants/m2)
          depth1 = 50  # Enter sowing depth (mm)
          row_spacing1 = 150  # Enter row spacing (mm)
          # Extra Parameters
          ftn1 = na  # Enter Fertile Tiller Number (na for auto)
          skiprow1 = solid  # Skip row
          tillageImplement = na  # Name of tillage implement (na if not in use)
```csharp
using System;
using ModelFramework;
using CSGeneral;

// Basic crop management: sowing & harvesting.
// Multi-paddock aware.
// This component DOES NOT require a trigger from the sequencer.
// It will assume it is the only crop in the system if it doesnt find a sequencer.
// If it does find a sequencer, it will do nothing until told to (via Enter/Leave).
public class Script 
{      
   [Link()]  public Simulation MySimulation;
   
   [Param()] private string crop;         // The module name of this crop
   [Param()] private string date1;         //Start of sowing window
   [Param()] private string date2;         //End of sowing window
   [Param()] private string date3;         //date to change to different cultivar
   [Param()] int esw_amount;
   [Param()] private string must_sow;

   [Input()] private DateTime today;

   // Rainfall accumulator
   [Param()] int rain_days;              //check for rain over this period
   [Param()] int rain_amount;            //this much rain over that period

   // Daily rainfall from the system
   [Input] private double rain;
   private ManagerUtility.Tracker<double> rainTracker; 

   private bool inWindow = false;
   private bool endOfWindow = false;
   private bool ChangeCultivar = false;

   //initialise tracker, telling it how many days to track
   [EventHandler] public void OnInitialised()
   {
      rainTracker = new ManagerUtility.Tracker<double>(rain_days); 
   }

   // Daily tests common to all paddocks
   [EventHandler] public void OnPrepare()
   {
      bool startOfWindow = DateUtility.DatesEqual(date1, today);

      inWindow = DateUtility.WithinDates(date1, today, date2);
      ChangeCultivar = false;
      if(date3 != "na")  
         ChangeCultivar = DateUtility.WithinDates(date3, today, date2);
      endOfWindow = DateUtility.DatesEqual(date2, today);

      rainTracker.Add(rain);
      string currentPaddock = "";
      if (MySimulation.Get("currentPaddock", out currentPaddock) == false) 
      {
         // If there is no sequencer plugged in then we are it..
         if (canEnter > 0) {
            OnEnter();
         }
         if (canLeave > 0) {
            OnLeave();
         }
      }
   }
   // Test whether we can sow a crop today
   // +ve number - yes
   // 0          - no
   // -ve number - no, out of scope (planting window)
   [Output, Description("Test whether we can sow a crop today")] public int canEnter  {
      get {
         bool isPossibleToday = false;
         
         string currentPaddock;
         MySimulation.Get("currentPaddock", out currentPaddock);
         //Console.WriteLine("1. '" + currentPaddock + "'");

         Component paddockModule;
         if (currentPaddock != "")
            paddockModule = (Component) MySimulation.LinkByName(currentPaddock);
         else
            paddockModule = (Component) MySimulation.ChildPaddocks[0];
         //Console.WriteLine("2. " + paddockModule.Name);

         Component cropModule = (Component) paddockModule.LinkByName( crop );

         //Console.WriteLine("3. " + cropModule.Name);
         string plantStatus = "";
         cropModule.Get("plant_status", out plantStatus);

         double esw = 0.0;
         Component soilModule = (Component) paddockModule.LinkByType("SoilWat");
         soilModule.Get("esw", out esw);
         if (plantStatus == "out" &&
             inWindow &&
             rainTracker.Sum() >= rain_amount &&
             esw > esw_amount) 
         {
             isPossibleToday = true;
         } 

	     if (isPossibleToday)
            return 1;
         
         if (plantStatus == "out" && endOfWindow && must_sow == "yes")
            return 1;

         if (plantStatus == "out" && !inWindow)
            return -1;
         
         return 0;
      }
   }  
   
   
   // Sow a crop
   [Param()] private string cultivar1;
   [Param()] private string cultivar2;
   [Param()] private double density1;
   [Param()] private double depth1;
   [Param()] private double row_spacing1;
   [Param()] private string ftn1;
   [Param()] private string skiprow1;
   [Param()] private string tillageImplement;
   
   [EventHandler, Description("Sow the crop")] public void OnEnter()
   {
      Console.WriteLine(today + " Sowing Crop");
      SowType data = new SowType();
      data.Cultivar = cultivar1;
      if(ChangeCultivar)
         data.Cultivar = cultivar2;

      data.plants = density1;
      data.sowing_depth = depth1;
      data.row_spacing = row_spacing1;
      data.tiller_no_fertile = (ftn1 == "na") ? "" : ftn1;
      data.SkipRow = 0 ;
      if (skiprow1 == "single")
         data.SkipRow = 1;
      else if (skiprow1 == "double")
         data.SkipRow = 2;

      string currentPaddock;
      MySimulation.Get("currentPaddock", out currentPaddock);
      Component cropModule;
      if (currentPaddock != "")
         cropModule = (Component) MySimulation.LinkByName(currentPaddock + "." + crop);
      else 
         cropModule = (Component) MySimulation.ChildPaddocks[0].LinkByName(crop);

      cropModule.Publish("Sow", data);

      if (tillageImplement.ToLower() != "na") 
	  {
         TillageType t = new TillageType();
         t.type = tillageImplement;
         Component paddockModule;
         if (currentPaddock != "")
            paddockModule = (Component) MySimulation.LinkByName(currentPaddock);
         else
            paddockModule = MySimulation.ChildPaddocks[0];
         paddockModule.Publish("tillage", t);
      }		 
   }

   // Test whether we can harvest a crop today
   // +ve number - yes
   // 0          - no
   // -ve        - out of scope
   [Output] public int canLeave  
   {
      get 
      {
         string currentPaddock;
         MySimulation.Get("currentPaddock", out currentPaddock);

         string plantStatus = "";
         MySimulation.Get((currentPaddock != "" ? currentPaddock + "." : "") + crop + ".plant_status", out plantStatus);
         if (plantStatus == "out")
            return -1;

         string StageName = "";
         MySimulation.Get((currentPaddock != "" ? currentPaddock + "." : "") + crop + ".StageName", out StageName);
         if (StageName == "harvest_ripe" || plantStatus == "dead")
            return 1;
         return 0;
      }
   }

   [EventHandler] public void OnLeave()
   {
      Console.WriteLine(today + " Harvesting Crop");
      HarvestType hdata = new HarvestType();
      hdata.Remove = 0.0;
      string currentPaddock;
      MySimulation.Get("currentPaddock", out currentPaddock);
      Component cropModule;
      if (currentPaddock != "")
         cropModule = (Component) MySimulation.LinkByName(currentPaddock + "." + crop);
      else 
         cropModule = (Component) MySimulation.ChildPaddocks[0].LinkByName(crop);

      cropModule.Publish("harvest", hdata);

      KillCropType kdata = new KillCropType();
      kdata.KillFraction = 0.0F;
      cropModule.Publish("killcrop", kdata);
      cropModule.Publish("end_crop");
   } 
}
```
        manager2 FertOnEvent
          # Test for the mineral N in the soil and don't apply the fertiliser if greater than X kgN/ha is stored in the soil above a depth of Y mm
          ModuleName = wheat  # On which module should the event come from
          EventName = sowing  # On which event should fertiliser be applied : (see the list by module in Reporting Frequency for possible events)
          Days2Wait = 3  # Number of days to wait after the event happens before the fertiliser is applied
          # Test for the mineral N in the soil and don't apply the fertiliser if greater than X kgN/ha is stored in the soil above a depth of Y mm
          FertAmtCriteria = 0  # Don't add fertiliser if N in the soil to the depth below exceeds (kg/ha) (insert a large value to avoid this test)
          FertDepthCriteria = 0  # Depth to which the amount of N in the soil should be calculated (mm)
          # Fertiliser application details
          FertDepth = 5  # Depth at which to apply the fertiliser (mm)
          FertAmt = 100  # Amount of fertiliser to add (kg N /ha)
          FertType = urea_n  # Fertiliser type - select from the list
```vb
Imports System
Imports ModelFramework

Public Class Script 
   <Link()> Dim MyPaddock As Paddock
   <Link()> Dim Fert As Fertiliser

   'Parameters - user inputs from the Properties tab

   <Param> Private ModuleName As String         'Module that sends the even that will be used in the decision
   <Param> Private EventName As String          'The name of the event (e.g. "sowing", "irrigated") to control the fertiliser decision
   <Param> Private Days2Wait As Integer         'Wait this many days after the event before applying the fertiliser

   <Param> Private FertAmtCriteria As Single    'Don't apply fertiliser if the N stored in the soil is greater than this.  Disregard the test if the value is -ve
   <Param> Private FertDepthCriteria As Single  'Depth in the soil to calculate the N storage

   <Param> Private FertDepth As Single          'Depth in the soil that the fertilser will be applied
   <Param> Private FertAmt As Single            'Total annual application - needs to be split up between the various application dates listed
   <Param> Private FertType As String           'Type of fertliser to apply

   'Inputs - got by this Manager from elsewhere in APSIM
   <Input> Private Today As DateTime            'Today's date from APSIM 
   <Input> Private dlayer As Single()           'Array of soil layer thicknesses - for calculation of mineral N in the soil
   <Input> Private no3 As Single()              'Array of nitrate-N (kg N /ha) for each soil layer - for calculation of mineral N in the soil
   <Input> Private nh4 As Single()              'Array of ammonium-N (kg N /ha) for each soil layer - for calculation of mineral N in the soil
   <Input> Private urea As Single()             'Array of urea-N (kg N /ha) for each soil layer - for calculation of mineral N in the soil

   'Outputs - calculated by this Manager and available to be output by the user
   <Output> Private CumSoilN As Single          'Mineral-N stored in the soil to a depth of FertDepthCriteria

   'Other variables that are calculated but not needed for outputs
   Private LayerWeights As Single()             'Weigthing of each layer for FertAmtCriteria calculation
   Private CountingTheDays As Integer           'Variable to count the days from the event to the fertiliser application
   Private DoFert As Boolean                    'Variable to help with the fertiliser application decision


   <EventHandler()> Public Sub OnInit2()
      '"OnInit2" is an event handler gets called once at the start of the simulation 

      'Initialise the variables for the delay between the event and the actual application
      CountingTheDays = 0
      DoFert = False

   End Sub

   <EventHandler("[ModuleName].[EventName]")> Public Sub TriggerApplyMyFertiliser() 
      'This subroutine will be called when [ModuleName].[EventName] is fired

      'Initialise the counter between the event and the fertiliser application.  The actual fertiliser aplication is done in the ApplyMyFertiliser subroutine
      CountingTheDays = 1
      DoFert = True

      'if there is to be no delay between the event and the fertiliser application then just go  do it now (don't wait for a Prepare stage which might not be until tomorrow)
      'reset the DoFert because now the fertiliser has been applied (nothing in the queue anymore)
      If Days2Wait = 0 Then
         ApplyMyFertiliser
         DoFert = False
      End If

   End Sub

   <EventHandler()> Public Sub OnPrepare()
      '"OnPrepare" is an event handler gets called once at the start of every day (before Prepare and Post) 

      'Increment the counter once per day if are in that delay stage between the event and the application
      'If the delay period is over then go to the subroutine for the fertiliser application and reset DoFert
      If DoFert Then
         CountingTheDays += 1
         If CountingTheDays >= Days2Wait Then
            ApplyMyFertiliser
            DoFert = False
         End If
      End If

   End Sub

   <EventHandler()> Public Sub ApplyMyFertiliser()
      'This subroutine sends Fertiliser the command to apply the fertiliser 

      'Set the number of elements in the LayerWeights array to equal the number of soil layers - do this here because erosion can change the layering
      'Then move through the array and assign a LayerWeighting from 0 to 1 quantifying what proportion of the soil and mineral N in this layer is above FertDepthCriteria
      ReDim LayerWeights(dlayer.length - 1)                
      Dim CumDepth As Single = 0.0
         For i As Integer = 0 To dlayer.Length - 1     
            CumDepth += dlayer(i)                      
         If CumDepth <= FertDepthCriteria Then
            LayerWeights(i) = 1.0                   
         ElseIf (CumDepth - dlayer(i)) <= FertDepthCriteria Then
            LayerWeights(i) = (FertDepthCriteria - (CumDepth - dlayer(i))) / dlayer(i)
         Else
            LayerWeights(i) = 0.0
         End If
      Next

      'Add up the no3, nh4 and urea (all already in kg N /ha) in each layer and multiply by the layer weighting to get the total mineral N to the set depth
      CumSoilN = 0.0
      For i As Integer = 0 To dlayer.Length - 1     
         CumSoilN += (no3(i) + nh4(i) + urea(i)) * LayerWeights(i)                         
      Next

      'If there is less mineral N in the soil than FertAmtCriteria then it is OK to add fertiliser
      '"Fert.Apply" send the command to apply the specified amount of fertiliser at the specified depth of the specified type of fertiliser
      If CumSoilN <= FertAmtCriteria Then
         Fert.Apply(FertAmt, FertDepth, FertType)
      End If

   End Sub

End Class
```
        manager Harvesting rule
          # Harvesting criteria
          crop = wheat  # Enter name of crop to harvest when ripe
          on end_of_day:
```
           if ([crop].StageName = 'harvest_ripe' or [crop].plant_status = 'dead') then
              [crop]  harvest
              [crop]  end_crop
           endif
```
        manager Fertilise on fixed date
          # When should fertiliser be applied
          fert_date = 10-feb  # Enter fertiliser date (dd-mmm)
          fert_criteria = 1000  # Don't add fertiliser if N in top 2 layers exceeds (kg/ha)
          # Fertiliser application details
          fertmodule = fertiliser  # Module used to apply the fertiliser
          fert_amount = 60  # Amount of fertiliser to apply (kg/ha)
          fert_type = urea_N  # Fertiliser type
          on start_of_day:
```
         if (today = date('[fert_date]') then
            N_topsoil = no3(1) + nh4(1) + no3(2) + nh4(2)
            if (N_topsoil < [fert_criteria]) then
               [fertmodule] apply amount = [fert_amount] (kg/ha), depth = 50 (mm), type = [fert_type] ()
            endif
         endif
```
        manager Fertilise on fixed date1
          # When should fertiliser be applied
          fert_date = 15-apr  # Enter fertiliser date (dd-mmm)
          fert_criteria = 1000  # Don't add fertiliser if N in top 2 layers exceeds (kg/ha)
          # Fertiliser application details
          fertmodule = fertiliser  # Module used to apply the fertiliser
          fert_amount = 0  # Amount of fertiliser to apply (kg/ha)
          fert_type = urea_N  # Fertiliser type
          on start_of_day:
          script: same as in Namwon_2023.paddock.Manager folder.Fertilise on fixed date
      outputfile: filename=Namwon_2023.out; title=Namwon_2023
        variables
          variables: dd/mm/yyyy as Date, day, biomass, yield, grain_protein, grain_size, esw, lai, sws, sw_stress_expan, n_stress_expan, root_depth, Rain
        events Reporting Frequency
          events: harvesting, end_day
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